08/07/2014
19:15
;; 1. Based on: run013
;; 2. Description: 2-comp iv, linear elim, allom IBW on CL, WGT on V1 V2, IIV CL V1 prop+ FIX add error
;; x1. Author: Sebastian G. Wicha, Freie Universiaet Berlin
;; 3. Label:
$PROBLEM    PK
$INPUT      ID TIME DV AMT RATE MDV EVID CMT AGE SEX HGT WGT BMI SCR
            CGCRCL IBW IBWCGCRCL
$DATA       KP_MOX02_20140606_POOLED.csv ; IGNORE=#
$SUBROUTINE ADVAN3 TRANS4
$PK

TVCL  = THETA(1)
ASCCL = TVCL * (IBW/70)**0.75
CL    = ASCCL * EXP(ETA(1))

TVV1  = THETA(2)
ASCV1 = TVV1 * (WGT/70)**1
V1    = ASCV1 * EXP(ETA(2))

Q  = THETA(3)

TVV2 = THETA(4)
ASCV2 = TVV2 * (WGT/70)**1
V2    = ASCV2

S1 = V1

$ERROR
IPRED = F
DEL   = 0
IF (IPRED.EQ.0) DEL=0.0001
W     = F
Y     = F+F*EPS(1)+EPS(2)
IRES  = DV-IPRED
IWRES = IRES/(W+DEL)

$THETA  (0,10) ; CL
 (0,50) ; V1
 (0,50) ; Q
 (0,50) ; V2
$OMEGA  0.1  ;     IIV CL
 0.1  ;     IIV V1
$SIGMA  .1  ;       Prop
 .00465  FIX  ;        Add
$ESTIMATION METHOD=1 INTER MAXEVAL=2000 NOABORT SIG=3 PRINT=1 POSTHOC
; Xpose
$COVARIANCE
$TABLE      ID TIME DV MDV AMT EVID PRED IPRED CWRES WRES IWRES
            NOAPPEND ONEHEADER NOPRINT FILE=sdtab021
$TABLE      ID CL V1 Q V2 ETA1 ETA2 NOAPPEND ONEHEADER NOPRINT
            FILE=patab021
$TABLE      ID TIME AGE HGT WGT BMI SCR CGCRCL IBW IBWCGCRCL NOAPPEND
            ONEHEADER NOPRINT FILE=cotab021
$TABLE      ID TIME SEX NOAPPEND ONEHEADER NOPRINT file=catab001

NM-TRAN MESSAGES
 WARNINGS AND ERRORS (IF ANY) FOR PROBLEM    1
 (WARNING  2) NM-TRAN INFERS THAT THE DATA ARE POPULATION.

1NONLINEAR MIXED EFFECTS MODEL PROGRAM (NONMEM) VERSION 7.3.0
 ORIGINALLY DEVELOPED BY STUART BEAL, LEWIS SHEINER, AND ALISON BOECKMANN
 CURRENT DEVELOPERS ARE ROBERT BAUER, ICON DEVELOPMENT SOLUTIONS,
 AND ALISON BOECKMANN. IMPLEMENTATION, EFFICIENCY, AND STANDARDIZATION
 PERFORMED BY NOUS INFOSYSTEMS.
 PROBLEM NO.:         1
 PK
 TOT. NO. OF OBS RECS:      408
 TOT. NO. OF INDIVIDUALS:     50
 TWO COMPARTMENT MODEL (ADVAN3)
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 #TBLN:      1
 #METH: First Order Conditional Estimation with Interaction
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
 #TERM:
0MINIMIZATION SUCCESSFUL
 NO. OF FUNCTION EVALUATIONS USED:      165
 NO. OF SIG. DIGITS IN FINAL EST.:  3.5

 ETABAR IS THE ARITHMETIC MEAN OF THE ETA-ESTIMATES,
 AND THE P-VALUE IS GIVEN FOR THE NULL HYPOTHESIS THAT THE TRUE MEAN IS 0.

 ETABAR:         7.8222E-04 -3.9630E-04
 SE:             3.3516E-02  3.3151E-02
 N:                      50          50

 P VAL.:         9.8138E-01  9.9046E-01

 ETAshrink(%):   4.8179E+00  1.2035E+01
 EBVshrink(%):   5.2719E+00  1.2649E+01
 EPSshrink(%):   1.0020E+01  1.0020E+01

 #TERE:
 Elapsed estimation time in seconds:     2.63
 Elapsed covariance time in seconds:     2.63

 ********************               FIRST ORDER CONDITIONAL ESTIMATION WITH INTERACTION              ********************
 #OBJT:**************                       MINIMUM VALUE OF OBJECTIVE FUNCTION                      ********************
 #OBJV:********************************************     -383.044       **************************************************

 ********************               FIRST ORDER CONDITIONAL ESTIMATION WITH INTERACTION              ********************
 ********************                             FINAL PARAMETER ESTIMATE                           ********************

 THETA - VECTOR OF FIXED EFFECTS PARAMETERS   *********
         TH 1      TH 2      TH 3      TH 4
         1.21E+01  6.81E+01  2.03E+01  4.46E+01

 OMEGA - COV MATRIX FOR RANDOM EFFECTS - ETAS  ********
            ETA1      ETA2
 ETA1
+        6.33E-02
 ETA2
+        0.00E+00  7.25E-02

 SIGMA - COV MATRIX FOR RANDOM EFFECTS - EPSILONS  ****
            EPS1      EPS2
 EPS1
+        3.40E-02
 EPS2
+        0.00E+00  4.65E-03

 OMEGA - CORR MATRIX FOR RANDOM EFFECTS - ETAS  *******
            ETA1      ETA2
 ETA1
+        2.52E-01
 ETA2
+        0.00E+00  2.69E-01

 SIGMA - CORR MATRIX FOR RANDOM EFFECTS - EPSILONS  ***
            EPS1      EPS2
 EPS1
+        1.84E-01
 EPS2
+        0.00E+00  6.82E-02

 ********************               FIRST ORDER CONDITIONAL ESTIMATION WITH INTERACTION              ********************
 ********************                            STANDARD ERROR OF ESTIMATE                          ********************

 THETA - VECTOR OF FIXED EFFECTS PARAMETERS   *********
         TH 1      TH 2      TH 3      TH 4
         4.28E-01  3.49E+00  2.95E+00  3.15E+00

 OMEGA - COV MATRIX FOR RANDOM EFFECTS - ETAS  ********
            ETA1      ETA2
 ETA1
+        1.57E-02
 ETA2
+       .........  2.52E-02

 SIGMA - COV MATRIX FOR RANDOM EFFECTS - EPSILONS  ****
            EPS1      EPS2
 EPS1
+        9.83E-03
 EPS2
+       ......... .........

 OMEGA - CORR MATRIX FOR RANDOM EFFECTS - ETAS  *******
            ETA1      ETA2
 ETA1
+        3.12E-02
 ETA2
+       .........  4.68E-02

 SIGMA - CORR MATRIX FOR RANDOM EFFECTS - EPSILONS  ***
            EPS1      EPS2
 EPS1
+        2.67E-02
 EPS2
+       ......... .........

 ********************               FIRST ORDER CONDITIONAL ESTIMATION WITH INTERACTION              ********************
 ********************                          COVARIANCE MATRIX OF ESTIMATE                         ********************

            TH 1      TH 2      TH 3      TH 4      OM11      OM12      OM22      SG11      SG12      SG22
 TH 1
+        1.83E-01
 TH 2
+        1.92E-01  1.22E+01
 TH 3
+        2.66E-01 -5.17E+00  8.71E+00
 TH 4
+        1.60E-01 -1.03E+00  5.15E+00  9.92E+00
 OM11
+        8.58E-04  6.61E-03 -1.04E-03  8.04E-03  2.47E-04
 OM12
+       ......... ......... ......... ......... ......... .........
 OM22
+       -1.13E-03 -5.20E-02  2.20E-02  1.79E-02  1.93E-05 .........  6.34E-04
 SG11
+       -1.00E-03  1.10E-02 -3.16E-03  8.86E-03  5.73E-05 .........  1.04E-05  9.67E-05
 SG12
+       ......... ......... ......... ......... ......... ......... ......... ......... .........
 SG22
+       ......... ......... ......... ......... ......... ......... ......... ......... ......... .........

 ********************               FIRST ORDER CONDITIONAL ESTIMATION WITH INTERACTION              ********************
 ********************                          CORRELATION MATRIX OF ESTIMATE                        ********************

            TH 1      TH 2      TH 3      TH 4      OM11      OM12      OM22      SG11      SG12      SG22
 TH 1
+        4.28E-01
 TH 2
+        1.29E-01  3.49E+00
 TH 3
+        2.11E-01 -5.02E-01  2.95E+00
 TH 4
+        1.19E-01 -9.38E-02  5.54E-01  3.15E+00
 OM11
+        1.27E-01  1.21E-01 -2.24E-02  1.62E-01  1.57E-02
 OM12
+       ......... ......... ......... ......... ......... .........
 OM22
+       -1.05E-01 -5.93E-01  2.96E-01  2.26E-01  4.86E-02 .........  2.52E-02
 SG11
+       -2.39E-01  3.22E-01 -1.09E-01  2.86E-01  3.71E-01 .........  4.19E-02  9.83E-03
 SG12
+       ......... ......... ......... ......... ......... ......... ......... ......... .........
 SG22
+       ......... ......... ......... ......... ......... ......... ......... ......... ......... .........
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 #CPUT: Total CPU Time in Seconds,        5.429
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