Mon Nov 30 14:26:27 CET 2015
;; 1. Based on: run021
;; 2. Description: PK of moxifloxacin in patients with diabetic foot infections
;; x1. Author: Sebastian G. Wicha, Freie Universitaet Berlin, Germany
;; 3. Label:
$PROBLEM    PK
$INPUT      ID TIME DV AMT RATE MDV EVID CMT WGT IBW
$DATA      MOX02_sim.csv
 ; IGNORE=#
$SUBROUTINE ADVAN3 TRANS4
$PK

TVCL  = THETA(1)
ASCCL = TVCL * (IBW/70)**0.75
CL    = ASCCL * EXP(ETA(1))

TVV1  = THETA(2)
ASCV1 = TVV1 * (WGT/70)**1
V1    = ASCV1 * EXP(ETA(2))

Q  = THETA(3)

TVV2 = THETA(4)
ASCV2 = TVV2 * (WGT/70)**1
V2    = ASCV2

S1 = V1

$ERROR
IPRED = F
DEL   = 0
IF (IPRED.EQ.0) DEL=0.0001
W     = F
Y     = F+F*EPS(1)+EPS(2)
IRES  = DV-IPRED
IWRES = IRES/(W+DEL)

$THETA  1.21E+01 ; CL
 6.81E+01 ; V1
 2.03E+01 ; Q
 4.46E+01 ; V2
$OMEGA  6.33E-02  ;        CL_
 7.25E-02  ;        V1_
$SIGMA  3.40E-02  ;       Prop
 4.65E-03  ;        Add
$ESTIMATION METHOD=1 INTER MAXEVAL=0 NOABORT SIG=3 PRINT=1 POSTHOC
;$COV

NM-TRAN MESSAGES
 WARNINGS AND ERRORS (IF ANY) FOR PROBLEM    1
 (WARNING  2) NM-TRAN INFERS THAT THE DATA ARE POPULATION.

1NONLINEAR MIXED EFFECTS MODEL PROGRAM (NONMEM) VERSION 7.3.0
 ORIGINALLY DEVELOPED BY STUART BEAL, LEWIS SHEINER, AND ALISON BOECKMANN
 CURRENT DEVELOPERS ARE ROBERT BAUER, ICON DEVELOPMENT SOLUTIONS,
 AND ALISON BOECKMANN. IMPLEMENTATION, EFFICIENCY, AND STANDARDIZATION
 PERFORMED BY NOUS INFOSYSTEMS.
 PROBLEM NO.:         1
 PK
 TOT. NO. OF OBS RECS:      408
 TOT. NO. OF INDIVIDUALS:     50
 TWO COMPARTMENT MODEL (ADVAN3)
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 #TBLN:      1
 #METH: First Order Conditional Estimation with Interaction (Evaluation)
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
 ********************         FIRST ORDER CONDITIONAL ESTIMATION WITH INTERACTION (EVALUATION)       ********************
 #OBJT:**************                       MINIMUM VALUE OF OBJECTIVE FUNCTION                      ********************
 #OBJV:********************************************     -329.683       **************************************************

 ********************         FIRST ORDER CONDITIONAL ESTIMATION WITH INTERACTION (EVALUATION)       ********************
 ********************                             FINAL PARAMETER ESTIMATE                           ********************

 THETA - VECTOR OF FIXED EFFECTS PARAMETERS   *********
         TH 1      TH 2      TH 3      TH 4
         1.21E+01  6.81E+01  2.03E+01  4.46E+01

 OMEGA - COV MATRIX FOR RANDOM EFFECTS - ETAS  ********
            ETA1      ETA2
 ETA1
+        6.33E-02
 ETA2
+        0.00E+00  7.25E-02

 SIGMA - COV MATRIX FOR RANDOM EFFECTS - EPSILONS  ****
            EPS1      EPS2
 EPS1
+        3.40E-02
 EPS2
+        0.00E+00  4.65E-03

 OMEGA - CORR MATRIX FOR RANDOM EFFECTS - ETAS  *******
            ETA1      ETA2
 ETA1
+        2.52E-01
 ETA2
+        0.00E+00  2.69E-01

 SIGMA - CORR MATRIX FOR RANDOM EFFECTS - EPSILONS  ***
            EPS1      EPS2
 EPS1
+        1.84E-01
 EPS2
+        0.00E+00  6.82E-02
 #CPUT: Total CPU Time in Seconds,        0.053
